# Beregning af hvor mange overflows vi får pr sekund til LAB#10
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clkGen := 3686400
PS := 64
TOP := 2^8
Antal_interrupts_pr_sekund := clkGen/(PS*TOP*x) == 1 solve, x → 225
Antal_interrupts_pr_sekund = 225
